// COMSOL Multiphysics 5.3.1.201 model "ask_1.mph"
// Outline of the model tree

Parameters
  t0 = 3600 [s]
  D = 0.01 [um^2/s]
  cinf = 0.04 [ug/ml]
  r_last = 400 [um]
  k = t0*D

Geometry
  geom1 "Geometry 1" (1D, length unit m)
    i1: Interval | p2 = r_last; p = {0, r_last}
    fin: Finalize "Form Union"

Physics
  c: CoefficientFormPDE on all domains
    dependent variable u
    Units.DependentVariableQuantity = none
    Units.CustomDependentVariableUnit = ug/ml
    Units.CustomSourceTermUnit = ug/ml
    cfeq1: CoefficientFormPDE (default) | c = x^2; f = 0; da = x^2/D
    zflx1: ZeroFluxBoundary "Zero Flux 1" (default)
    init1: init "Initial Values 1" (default)
    dir1: DirichletBoundary "Dirichlet Boundary Condition 1" on boundaries 2 | r = cinf

Mesh
  mesh1 "Mesh 1" (physics-controlled)
    size: MeshSizeDefault | hauto = 1

Studies
  std1 "Study 1"
    time: Transient "Time Dependent" | tunit = h; tlist = range(0,1,168); usertol = on; rtol = 0.0001

Solver configurations
  sol1 "Solution 1" (study std1)
    v1: Variables "Dependent Variables 1"
    t1: Time "Time-Dependent Solver 1" | tlist = range(0,1,168)
      dDef: Direct
      fc1: FullyCoupled | linsolver = dDef

Datasets
  dset1: Solution | solution = sol1

Plots
  pg1: PlotGroup1D "1D Plot Group 1" | data = dset1
    lngr1: LineGraph on all domains | expr = u; unit = ug/ml; xdata = expr; xdataexpr = x

Exports
  plot1: Plot
    filename = C:\Users\Manos\OneDrive - Εθνικό Μετσόβιο Πολυτεχνείο\COMPMECH\2ο Εξάμηνο\Εμβιομηχανική\HW\HW1\comsol_6_24_168.txt